Simulations: Version=181
  Experiment pd: DisabledSimNames=[pdSowDate10-Nov, pdSowDate15-Apr]
    Memo README
      This experiment uses a fertiliser factor to simulate an N-rate trial. The graph shows the effect of the fertiliser applications on total soil nitrate level in each treatment.
    Factors
      Factor MSD (disabled)
        Specification=[MaizeSowingRule].Script.SowDate = 1 Nov, 7 Nov, 14 Nov, 21 Nov, 28 Nov
      Factor PSD (disabled)
        Specification=[PeanutSowingRule].Script.SowDate = 1 Nov, 7 Nov, 14 Nov, 21 Nov, 28 Nov
      Permutation
        Factor MSD
          Specification=[MaizeSowingRule].Script.SowDate = 1 Nov, 7 Nov, 14 Nov, 21 Nov, 28 Nov
        Factor PSD
          Specification=[PeanutSowingRule].Script.SowDate = 1 Nov, 7 Nov, 14 Nov, 21 Nov, 28 Nov
    Simulation Base_one
      Clock: Start=1965-01-01; End=1999-04-30
      Summary SummaryFile
      Weather
        FileName=C:\Program Files\APSIM2024.9.7586.0\Examples\WeatherFiles\AU_Dalby.met
      SoilArbitrator Soil Arbitrator
      Zone Field: Area=1; Slope=0; AspectAngle=0; Altitude=50
        Report
          VariableNames:
            [Clock].Today
            [Peanut].AboveGround.Wt
            [Peanut].AboveGround.N
            [Maize].AboveGround.Wt
            [Maize].AboveGround.N
            [Peanut].Grain.Total.Wt*10 as PeanutYield
            [Maize].Grain.Total.Wt*10 as MaizeYield
            Mean([Soil].Nutrient.NO3.ppm[1:4]) as MeanNO3ppmTop4Layers
            Sum([Soil].Nutrient.NO3.ppm[1:4]) as SumNO3ppmTop4Layers
            Mean([Soil].Nutrient.NH4.ppm[1:4]) as MeanNH4ppmTop4Layers
            Sum([Soil].Nutrient.NH4.ppm[1:4]) as SumNH4ppmTop4Layers
            Mean([Soil].Nutrient.TotalC) as MeanTC
            Sum([Soil].Nutrient.TotalC) as SumTC
          EventNames:
            [Peanut].Harvesting
            [Maize].Harvesting
        Fertiliser
        SurfaceOrganicMatter: InitialResidueName=maize_stubble; InitialResidueType=maize; InitialResidueMass=5000; InitialStandingFraction=0.5; InitialCPR=0; InitialCNR=100
        Soil: ASCOrder=NA; ASCSubOrder=NA; SoilType=Haplic Lixisols; Site=NA; NearestTown=NA; Region=NA; State=NA; Country=Kenya; NaturalVegetation=NA; ApsoilNumber=9999; Latitude=-1.375; Longitude=37.875; LocationAccuracy=+- 250 m; DataSource=ISRIC SoilGrids
          Physical
            Thickness  ParticleSizeSand  ParticleSizeSilt  ParticleSizeClay  BD     AirDry  LL15    DUL     SAT     KS
            50         37.4              37                26.3              0.9    0.2231  0.2431  0.4466  0.4762  9.2
            100        37                37                26                0.9    0.2187  0.2387  0.4401  0.4762  8.8
            150        36.7              36                27                0.9    0.1975  0.2175  0.3913  0.4762  4.2
            300        38.2              36                25                0.9    0.1736  0.1936  0.3556  0.4762  3
            400        39.4              31.57             31.5              1.07   0.184   0.2139  0.3577  0.4762  1.1
            1000       40.6              30.62             31                1.094  0.166   0.2007  0.3357  0.4762  0.7
            SoilCrop MaizeSoil: LL=[0.244, 0.249, 0.248, 0.203, 0.185, 0.167]; KL=[0.06, 0.0491, 0.0402, 0.0329, 0.027, 0.0221]; XF=[1, 1, 1, 1, 1, 1]
            SoilCrop PeanutSoil: LL=[0.244, 0.249, 0.248, 0.203, 0.185, 0.167]; KL=[0.06, 0.0491, 0.0402, 0.0329, 0.027, 0.0221]; XF=[1, 1, 1, 1, 1, 1]
            SoilCrop WheatSoil: LL=[0.244, 0.249, 0.248, 0.203, 0.185, 0.167]; KL=[0.06, 0.0491, 0.0402, 0.0329, 0.027, 0.0221]; XF=[1, 1, 1, 1, 1, 1]
          WaterBalance SoilWater: SummerDate=1-Nov; SummerU=5; SummerCona=5; WinterDate=1-Apr; WinterU=5; WinterCona=5; DiffusConst=40; DiffusSlope=16; Salb=0.12; CN2Bare=73; CNRed=20; CNCov=0.8; PSIDul=-100; Thickness=[50, 100, 150, 300, 400, 1000]; SWCON=[0.4, 0.4, 0.4, 0.4, 0.4, 0.4]
          Organic: FOMCNRatio=40; CarbonUnits=Total
            Thickness  Carbon  SoilCNRatio  FBiom   FInert  FOM
            50         8.35    12           0.04    0.8     150
            100        8.01    12           0.0327  0.808   122.8096
            150        5.52    12           0.0268  0.8162  100.548
            300        3.97    12           0.022   0.8244  82.3217
            400        2.9     12           0.018   0.8326  67.3993
            1000       1.64    12           0.0147  0.841   55.1819
          Chemical: Thickness=[50, 100, 150, 300, 400, 1000]; PH=[5.4, 5.5, 5.5, 5.4, 5.66, 5.83]; PHUnits=Water
          Water: Thickness=[50, 100, 150, 300, 400, 1000]; InitialValues=[0.329, 0.3305, 0.3315, 0.307, 0.287, 0.274]; InitialPAWmm=397.5358; RelativeTo=LL15; FilledFromTop=false
          CERESSoilTemperature Temperature
          Nutrient
          Solute NO3: Thickness=[50, 100, 150, 300, 400, 1000]; InitialValues=[0.5, 0.495, 0.4901, 0.4852, 0.4804, 0.4756]; InitialValuesUnits=ppm; WaterTableConcentration=0; D0=0; DepthConstant=0; MaxDepthSoluteAccessible=0; RunoffEffectivenessAtMovingSolute=0; MaxEffectiveRunoff=0
          Solute NH4: Thickness=[50, 100, 150, 300, 400, 1000]; InitialValues=[0.05, 0.0495, 0.049, 0.0485, 0.048, 0.0476]; InitialValuesUnits=ppm; WaterTableConcentration=0; D0=0; DepthConstant=0; MaxDepthSoluteAccessible=0; RunoffEffectivenessAtMovingSolute=0; MaxEffectiveRunoff=0
          Solute Urea: Thickness=[150, 150, 300, 300, 300, 300, 300]; InitialValues=[0, 0, 0, 0, 0, 0, 0]; InitialValuesUnits=kg/ha; WaterTableConcentration=0; D0=0; DepthConstant=0; MaxDepthSoluteAccessible=0; RunoffEffectivenessAtMovingSolute=0; MaxEffectiveRunoff=0
        MicroClimate: a_interception=0; b_interception=1; c_interception=0; d_interception=0; SoilHeatFluxFraction=0.4; MinimumHeightDiffForNewLayer=0; NightInterceptionFraction=0.5; ReferenceHeight=2
        Plant Maize
        Manager MaizeSowingRule
          Crop = [Maize]
          SowDate = 1-Nov
          CultivarName = Dekalb_XL82
          SowingDepth = 30
          RowSpacing = 750
          Population = 6
```csharp
using APSIM.Shared.Utilities;
using Models.Utilities;
using Models.Soils;
using Models.PMF;
using Models.Core;
using System;
using System.Linq;

namespace Models
{
    [Serializable]
    public class Script : Model
    {
        [Link] Clock Clock;
        [Link] Fertiliser Fertiliser;
        [Link] Summary Summary;
        [Link] Soil Soil;
        
        [Description("Crop")]
        public IPlant Crop { get; set; }

        [Description("Sowing date (d-mmm)")]
        public string SowDate { get; set; }

        [Display(Type = DisplayType.CultivarName)]
        [Description("Cultivar to be sown")]
        public string CultivarName { get; set; }

        [Description("Sowing depth (mm)")]
        public double SowingDepth { get; set; }

        [Description("Row spacing (mm)")]
        public double RowSpacing { get; set; }

        [Description("Plant population (/m2)")]
        public double Population { get; set; }

        [EventSubscribe("DoManagement")]
        private void OnDoManagement(object sender, EventArgs e)
        {
            if (DateUtilities.WithinDates(SowDate, Clock.Today, SowDate))
            {
                Crop.Sow(population: Population, cultivar: CultivarName, depth: SowingDepth, rowSpacing: RowSpacing);    
            }
        }
    }
}
```
        Manager MaizeFertiliserRule
          ApplicationAmount = 160
          FertType = Urea
          CropName = Maize
```csharp
using Models.Soils;
using System;
using Models.Core;
using Models.PMF;

namespace Models
{
    [Serializable]
    public class Script : Model
    {
        [Link]
        private Fertiliser fertiliser;

        [Link]
        private Clock clock;

        [Description("Amount (kg/ha) of fertiliser to apply")]
        public double ApplicationAmount { get; set; }

        [Description("Type of fertiliser to apply")]
        public Fertiliser.Types FertType { get; set; }
        
        [Description("Crop to be fertilised")]
        public string CropName { get; set;}

        [EventSubscribe("DoManagement")]
        private void OnDoManagement(object sender, EventArgs e)
        {
            Model crop = sender as Model;
            if (crop.Name.ToLower()==CropName.ToLower())
                fertiliser.Apply(Amount: ApplicationAmount, Type: FertType);
        }
    }
}
```
        Manager MaizeHarvest
          HarvestDate =
```csharp
using Models.Soils.Nutrients;
using System.Linq;
using System;
using Models.Core;
using Models.PMF;
using Models.Soils;
using Models.Soils.Nutrients;
using Models.Utilities;
using APSIM.Shared.Utilities;

namespace Models
{
    [Serializable]
    public class Script : Model
    {
        [Link(ByName=true)] Plant Maize;
        [Link] Clock clock;
        
        [Description("Harvest date (d-mmm)")]
        public string HarvestDate { get; set; }

        [EventSubscribe("DoManagement")]
        private void OnDoManagement(object sender, EventArgs e)
        {
            if (Maize.IsReadyForHarvesting)
            {
               Maize.Harvest();
               Maize.EndCrop();    
            }
        
        }
        
    }
}
```
        Plant Peanut
        Manager PeanutSowingRule
          Crop = [Peanut]
          SowDate = 1-Nov
          CultivarName = Florunner
          SowingDepth = 30
          RowSpacing = 750
          Population = 6
          script: same as in pd.Base_one.Field.MaizeSowingRule
        Manager PeanutFertiliserRule
          ApplicationAmount = 160
          FertType = Urea
          CropName = Peanut
          script: same as in pd.Base_one.Field.MaizeFertiliserRule
        Manager PeanutHarvest
```csharp
using Models.Soils.Nutrients;
using System;
using System.Linq;
using Models.Core;
using Models.PMF;
using Models.Soils;
using Models.Soils.Nutrients;
using Models.Utilities;
using APSIM.Shared.Utilities;

namespace Models
{
    [Serializable]
    public class Script : Model
    {
        [Link] Plant Peanut;

        [EventSubscribe("DoManagement")]
        private void OnDoManagement(object sender, EventArgs e)
        {
            if (Peanut.IsReadyForHarvesting)
            {
               Peanut.Harvest();
               Peanut.EndCrop();    
            }
        
        }
        
    }
}
```
  DataStore
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