Simulations: Version=203
  Experiment pd: DisabledSimNames=[pdSowDate10-Nov, pdSowDate15-Apr]
    Memo README
      This experiment uses a fertiliser factor to simulate an N-rate trial. The graph shows the effect of the fertiliser applications on total soil nitrate level in each treatment.
    Factors
      Permutation
        Factor MSD
          Specification=[MaizeSowingRule].Script.SowDate = 1 Nov, 7 Nov, 14 Nov, 21 Nov, 28 Nov
        Factor PSD
          Specification=[PeanutSowingRule].Script.SowDate = 3 mar, 10 mar, 17 mar, 24 mar, 1 may
    Simulation Base_one
      Clock: Start=1965-01-01; End=1999-04-30
      Summary SummaryFile
      Weather: FileName=D:\AU_Dalby.met
      SoilArbitrator Soil Arbitrator
      Zone Field: Area=1; Slope=0; AspectAngle=0; Altitude=50
        Report
          VariableNames:
            [Clock].Today
            [RotationManager].CurrentState
            [Peanut].Phenology.CurrentStageName
            [Peanut].IsAlive
            [Peanut].IsReadyForHarvesting
            [Peanut].AboveGround.Wt
            [Peanut].AboveGround.N
            [Maize].AboveGround.Wt
            [Maize].AboveGround.N
            [Maize].Grain.Total.Wt*10 as MaizeYield
            Mean([Soil].Nutrient.NO3.ppm[1:4]) as MeanNO3ppmTop4Layers
            Sum([Soil].Nutrient.NO3.ppm[1:4]) as SumNO3ppmTop4Layers
            Mean([Soil].Nutrient.NH4.ppm[1:4]) as MeanNH4ppmTop4Layers
            Sum([Soil].Nutrient.NH4.ppm[1:4]) as SumNH4ppmTop4Layers
            Mean([Soil].Nutrient.TotalC) as MeanTC
            Sum([Soil].Nutrient.TotalC) as SumTC
          EventNames:
            [Peanut].Harvesting
            [Maize].Harvesting
        Fertiliser
        SurfaceOrganicMatter: InitialResidueName=maize_stubble; InitialResidueType=maize; InitialResidueMass=5000; InitialStandingFraction=0.5; InitialCPR=0; InitialCNR=100
        Soil: ASCOrder=NA; ASCSubOrder=NA; SoilType=Haplic Lixisols; Site=NA; NearestTown=NA; Region=NA; State=NA; Country=Kenya; NaturalVegetation=NA; ApsoilNumber=9999; Latitude=-1.375; Longitude=37.875; LocationAccuracy=+- 250 m; DataSource=ISRIC SoilGrids
          Water: Thickness=[150, 150, 150, 150, 200, 200, 200, 200, 300, 300]; FilledFromTop=true
            InitialValues=[0.22, 0.23, 0.242, 0.247, 0.25, 0.25, 0.25, 0.25, 0.25, 0.25]
          Physical
            Thickness  ParticleSizeSand  ParticleSizeSilt  ParticleSizeClay  Rocks  BD     AirDry  LL15   DUL    SAT    KS
            150        50.3              14.7              35.5              0      1.341  0.073   0.22   0.314  0.452  5.717
            150        47                13.5              39                0      1.349  0.077   0.23   0.319  0.455  3.809
            150        44.2              13.2              41.8              0      1.345  0.081   0.242  0.332  0.46   2.769
            150        42.8              13.8              43.2              0      1.338  0.082   0.247  0.338  0.46   2.327
            200        42                14                44                0      1.336  0.083   0.25   0.341  0.46   2.133
            200        42                14                44                0      1.338  0.083   0.25   0.341  0.46   2.133
            200        42                14                44                0      1.339  0.083   0.25   0.341  0.46   2.133
            200        42                14                44                0      1.339  0.083   0.25   0.341  0.46   2.133
            300        42                14                44                0      1.339  0.083   0.25   0.341  0.46   2.133
            300        42                14                44                0      1.339  0.083   0.25   0.341  0.46   2.133
            Rocks source: Calculated
            SoilCrop MaizeSoil: LL=[0.244, 0.249, 0.248, 0.203, 0.185, 0.167]; KL=[0.06, 0.0491, 0.0402, 0.0329, 0.027, 0.0221]; XF=[1, 1, 1, 1, 1, 1]
            SoilCrop SoybeanSoil: LL=[0.244, 0.249, 0.248, 0.203, 0.185, 0.167]; KL=[0.06, 0.0491, 0.0402, 0.0329, 0.027, 0.0221]; XF=[1, 1, 1, 1, 1, 1]
            SoilCrop PeanutSoil: LL=[0.244, 0.249, 0.248, 0.203, 0.185, 0.167]; KL=[0.06, 0.0491, 0.0402, 0.0329, 0.027, 0.0221]; XF=[1, 1, 1, 1, 1, 1]
          WaterBalance SoilWater: SummerDate=1-nov; SummerU=3; SummerCona=6; WinterDate=1-apr; WinterU=3; WinterCona=6; DiffusConst=25886.95; DiffusSlope=-12.47; Salb=0.12; CN2Bare=73; CNRed=20; CNCov=0; DischargeWidth=5; CatchmentArea=10; PSIDul=-100; Thickness=[150, 150, 150, 150, 200, 200, 200, 200, 300, 300]
            SWCON=[0.194, 0.147, 0.121, 0.109, 0.08, 0.08, 0.08, 0.08, 0.055, 0.055]
          Organic: FOMCNRatio=40; CarbonUnits=Total
            Thickness  Carbon  SoilCNRatio  FBiom  FInert  FOM
            150        1.339   8            0.04   0.423   97.0304
            150        0.96    8            0.031  0.587   77.4803
            150        0.773   8            0.014  0.731   61.8693
            150        0.658   8            0.01   0.864   49.4036
            200        0.552   8            0.01   0.99    36.5991
            200        0.458   8            0.01   0.99    27.1133
            200        0.405   8            0.01   0.99    20.086
            200        0.393   8            0.01   0.99    14.8801
            300        0.378   8            0.01   0.99    9.48797
            300        0.36    8            0.01   0.99    6.04979
          Chemical: Thickness=[150, 150, 150, 150, 200, 200, 200, 200, 300, 300]; PH=[6.2, 6.2, 6.2, 6.2, 6.2, 6.2, 6.21, 6.23, 6.26, 6.29]; PHUnits=Water
          Nutrient
          Solute NO3: Thickness=[150, 150, 150, 150, 200, 200, 200, 200, 300, 300]; InitialValues=[0, 0, 0, 0, 0, 0, 0, 0, 0, 0]; InitialValuesUnits=ppm; WaterTableConcentration=0; D0=0; DepthConstant=0; MaxDepthSoluteAccessible=0; RunoffEffectivenessAtMovingSolute=0; MaxEffectiveRunoff=0
          Solute NH4: same as pd.Base_one.Field.Soil.NO3
          Solute Urea: Thickness=[150, 150, 150, 150, 200, 200, 200, 200, 300, 300]; InitialValues=[0, 0, 0, 0, 0, 0, 0, 0, 0, 0]; InitialValuesUnits=kg/ha; WaterTableConcentration=0; D0=0; DepthConstant=0; MaxDepthSoluteAccessible=0; RunoffEffectivenessAtMovingSolute=0; MaxEffectiveRunoff=0
          SoilTemperature Temperature
        MicroClimate: a_interception=0; b_interception=1; c_interception=0; d_interception=0; SoilHeatFluxFraction=0.4; MinimumHeightDiffForNewLayer=0; NightInterceptionFraction=0.5; ReferenceHeight=2
        RotationManager: TopLevel=true; InitialState=initial; Verbose=true
          Nodes:
            ID  Name
            1   summer fallow
            2   Peanut
            3   Maize
            4   initial
          Arcs:
            {SourceID=2, DestinationID=1, Conditions=[[PeanutManager].Script.CanHarvest], Actions=[[PeanutManager].Script.HarvestCrop("glable");], ID=5, Name=Arc 1}
            {SourceID=1, DestinationID=3, Conditions=[[MaizeManager].Script.CanSow], Actions=[[MaizeManager].Script.SowCrop()], ID=6, Name=Arc 2}
            {SourceID=3, DestinationID=4, Conditions=[[MaizeManager].Script.CanHarvest], Actions=[[MaizeManager].Script.HarvestCrop()], ID=7, Name=Arc 3}
            {SourceID=4, DestinationID=2, Conditions=[[PeanutManager].Script.CanSow], Actions=[[PeanutManager].Script.SowCrop()], ID=8, Name=Arc 4}
        Plant Maize
        Manager MaizeManager
          Crop = [Maize]
          Verbose = True
          StartDate = 10-oct
          EndDate = 20-nov
          MinESW = 50
          MinRain = 10
          RainDays = 14
          MustSow = True
          CultivarName = Katumani
          SowingDepth = 30
          RowSpacing = 750
          Population = 6
```csharp
using APSIM.Numerics;
using Models.Climate;
using System.Linq;
using System;
using Models.Core;
using Models.PMF;
using Models.Soils;
using Models.Utilities;
using APSIM.Shared.Utilities;
using Models.Interfaces;

namespace Models
{
    [Serializable]
    public class Script : Model
    {
        [Link] private Clock Clock;
        [Link] private Summary Summary;
        [Link] private Soil Soil;
        [Link]
        private ISoilWater waterBalance;
        //[Link] Simulation Simulation;

        [Separator("Script Configuration")]
        [Description("Crop to manage")]
        public IPlant Crop { get; set; }

        [Description("Run script in verbose mode?")]
        [Tooltip("If enabled, the script will print a large number of diagnostics to the summary file, to aid debugging")]
        public bool Verbose { get; set; }

        [Separator("Sowing Conditions")]
        [Description("Start of sowing window (d-mmm)")]
        public string StartDate { get; set; }
        [Description("End of sowing window (d-mmm)")]
        public string EndDate { get; set; }
        [Description("Minimum extractable soil water for sowing (mm)")]
        public double MinESW { get; set; }
        [Description("Accumulated rainfall required for sowing (mm)")]
        public double MinRain { get; set; }
        [Description("Duration of rainfall accumulation (d)")]
        public int RainDays { get; set; }
        [Tooltip("If enabled, and if sowing conditions are not met, the crop will be sown on the final day of the sowing window.")]
        [Description("Must sow (yes/no)")]
        public bool MustSow { get; set; }

        [Separator("Sowing Properties")]
        [Description("Cultivar to be sown")]
        [Display(Type = DisplayType.CultivarName)]
        public string CultivarName { get; set; }
        [Description("Sowing depth (mm)")]
        public double SowingDepth { get; set; }
        [Description("Row spacing (mm)")]
        public double RowSpacing { get; set; }
        [Description("Plant population (/m2)")]
        public double Population { get; set; }

        public Accumulator accumulatedRain { get; private set; }
        private bool afterInit = false;
                
        [EventSubscribe("StartOfSimulation")]
        private void OnSimulationCommencing(object sender, EventArgs e)
        {
            if (Crop == null)
                throw new Exception("Crop must not be null in rotations");
            accumulatedRain = new Accumulator(this, "[Weather].Rain", RainDays);
            Summary.WriteMessage(this, this.FullPath + " - Commence, crop=" + (Crop as Model).Name, MessageType.Diagnostic);
            afterInit = true;
        }
        
        [EventSubscribe("DoManagement")]
        private void DoManagement(object sender, EventArgs e)
        {
            accumulatedRain.Update();
        }

        // Test whether we can sow a crop today
        // +ve number - yes
        // 0          - no
        // -ve number - no, out of scope (planting window)
        [Units("0-1")]
        public int CanSow
        {
            get
            {
                if (!afterInit)
                    return 0;
                bool isPossibleToday = false;
                bool inWindow = DateUtilities.WithinDates(StartDate, Clock.Today, EndDate);
                bool endOfWindow = DateUtilities.DatesEqual(EndDate, Clock.Today);
                if (!Crop.IsAlive && inWindow && accumulatedRain.Sum > MinRain && MathUtilities.Sum(waterBalance.ESW) > MinESW)
                    isPossibleToday = true;

                if (isPossibleToday)
                    return 1;
         
                if (!Crop.IsAlive && endOfWindow && MustSow)
                    return 1;

                if (!Crop.IsAlive && !inWindow)
                    return -1;
                return 0;
            }
        }

        public void SowCrop()
        {
            Summary.WriteMessage(this, this.FullPath + " -  sowing " + (Crop as Model).Name, MessageType.Diagnostic);
            Crop.Sow(population: Population, cultivar: CultivarName, depth: SowingDepth, rowSpacing: RowSpacing);    
        }

        [Units("0-1")] 
        public int CanHarvest
        {
            get
            {
                if (!afterInit)
                    return (0);
                //Summary.WriteMessage(this, "canLeave:" + Crop.IsReadyForHarvesting, MessageType.Diagnostic);
                return Crop.IsReadyForHarvesting ? 1 : 0;
            }
        }

        public void HarvestCrop()
        {
            Crop.Harvest();
            Crop.EndCrop();
        }
    }
}
```
        Manager MaizeSowingRule
          Crop = [Maize]
          SowDate = 1-Nov
          CultivarName = Dekalb_XL82
          SowingDepth = 30
          RowSpacing = 750
          Population = 6
```csharp
using APSIM.Shared.Utilities;
using Models.Utilities;
using Models.Soils;
using Models.PMF;
using Models.Core;
using System;
using System.Linq;

namespace Models
{
    [Serializable]
    public class Script : Model
    {
        [Link] Clock Clock;
        [Link] Fertiliser Fertiliser;
        [Link] Summary Summary;
        [Link] Soil Soil;
        
        [Description("Crop")]
        public IPlant Crop { get; set; }

        [Description("Sowing date (d-mmm)")]
        public string SowDate { get; set; }

        [Display(Type = DisplayType.CultivarName)]
        [Description("Cultivar to be sown")]
        public string CultivarName { get; set; }

        [Description("Sowing depth (mm)")]
        public double SowingDepth { get; set; }

        [Description("Row spacing (mm)")]
        public double RowSpacing { get; set; }

        [Description("Plant population (/m2)")]
        public double Population { get; set; }

        [EventSubscribe("DoManagement")]
        private void OnDoManagement(object sender, EventArgs e)
        {
            if (DateUtilities.WithinDates(SowDate, Clock.Today, SowDate))
            {
                Crop.Sow(population: Population, cultivar: CultivarName, depth: SowingDepth, rowSpacing: RowSpacing);    
            }
        }
    }
}
```
        Manager MaizeFertiliserRule
          ApplicationAmount = 160
          FertType = UreaGranular
          CropName = Maize
```csharp
using Models.Soils;
using System;
using Models.Core;
using Models.PMF;

namespace Models
{
    [Serializable]
    public class Script : Model
    {
        [Link]
        private Fertiliser fertiliser;

        [Link]
        private Clock clock;

        [Description("Amount (kg/ha) of fertiliser to apply")]
        public double ApplicationAmount { get; set; }

        [Description("Type of fertiliser to apply")]
        [Display(Type = DisplayType.FertiliserType)]public string FertType { get; set; }
        
        [Description("Crop to be fertilised")]
        public string CropName { get; set;}

        [EventSubscribe("DoManagement")]
        private void OnDoManagement(object sender, EventArgs e)
        {
            Model crop = sender as Model;
            if (crop.Name.ToLower()==CropName.ToLower())
                fertiliser.Apply(amount: ApplicationAmount, type: FertType);
        }
    }
}
```
        Manager MaizeHarvest
          HarvestDate =
```csharp
using Models.Soils.Nutrients;
using System.Linq;
using System;
using Models.Core;
using Models.PMF;
using Models.Soils;
using Models.Soils.Nutrients;
using Models.Utilities;
using APSIM.Shared.Utilities;

namespace Models
{
    [Serializable]
    public class Script : Model
    {
        [Link(ByName=true)] Plant Maize;
        [Link] Clock clock;
        
        [Description("Harvest date (d-mmm)")]
        public string HarvestDate { get; set; }

        [EventSubscribe("DoManagement")]
        private void OnDoManagement(object sender, EventArgs e)
        {
            if (Maize.IsReadyForHarvesting)
            {
               Maize.Harvest();
               Maize.EndCrop();    
            }
        
        }
        
    }
}
```
        Plant Peanut
        Manager PeanutManager
          Crop = [Peanut]
          Verbose = True
          StartDate = 03-mar
          EndDate = 1-may
          MinESW = 50
          MinRain = 10
          RainDays = 7
          MustSow = True
          CultivarName = Florunner
          SowingDepth = 30
          RowSpacing = 250
          Population = 6
```csharp
using APSIM.Numerics;
using Models.Climate;
using System.Linq;
using System;
using Models.Core;
using Models.PMF;
using Models.Soils;
using Models.Utilities;
using APSIM.Shared.Utilities;
using Models.Interfaces;

namespace Models
{
    [Serializable]
    public class Script : Model
    {
        [Link] private Clock Clock;
        [Link] private Summary Summary;
        [Link] private Soil Soil;
        private Accumulator accumulatedRain;
        [Link]
        private ISoilWater waterBalance;

        [Separator("Script Configuration")]
        [Description("Crop to manage")]
        public IPlant Crop { get; set; }
        [Description("Run script in verbose mode?")]
        [Tooltip("If enabled, the script will print a large number of diagnostics to the summary file, to aid debugging")]
        public bool Verbose { get; set; }

        [Separator("Sowing Conditions")]
        [Description("Start of sowing window (d-mmm)")]
        public string StartDate { get; set;}
        [Description("End of sowing window (d-mmm)")]
        public string EndDate { get; set;}
        [Description("Minimum extractable soil water for sowing (mm)")]
        public double MinESW { get; set;}
        [Description("Accumulated rainfall required for sowing (mm)")]
        public double MinRain { get; set;}
        [Description("Duration of rainfall accumulation (d)")]
        public int RainDays { get; set;}

        [Tooltip("If enabled, and if sowing conditions are not met, the crop will be sown on the final day of the sowing window.")]
        [Description("Must sow (yes/no)")]
        public bool MustSow { get; set;}
        [Separator("Sowing Properties")]
        [Description("Cultivar to be sown")]
        [Display(Type=DisplayType.CultivarName)]
        public string CultivarName { get; set;}
        [Description("Sowing depth (mm)")]
        public double SowingDepth { get; set;}        
        [Description("Row spacing (mm)")]
        public double RowSpacing { get; set;}    
        [Description("Plant population (/m2)")]
        public double Population { get; set;}    

        private bool afterInit = false;

        [EventSubscribe("StartOfSimulation")]
        private void OnSimulationCommencing(object sender, EventArgs e)
        {
            if (Crop == null) { throw new Exception("Crop must not be null in rotations"); }
            accumulatedRain = new Accumulator(this, "[Weather].Rain", RainDays);
            afterInit = true;
            Summary.WriteMessage(this, this.FullPath + " - Commence, crop=" + (Crop as Model).Name, MessageType.Diagnostic);
        }
        
        [EventSubscribe("DoManagement")]
        private void DoManagement(object sender, EventArgs e)
        {
            accumulatedRain.Update();
        }

        // Test whether we can sow a crop today
        // +ve number - yes
        // 0          - no
        // -ve number - no, out of scope (planting window)
        [Units("0-1")]
        public bool CanSow
        {
            get
            {
                if (!afterInit)
                    return false;
                bool isPossibleToday = false;
                bool inWindow = DateUtilities.WithinDates(StartDate, Clock.Today, EndDate);
                bool endOfWindow = DateUtilities.DatesEqual(EndDate, Clock.Today);
                if (! Crop.IsAlive && inWindow && accumulatedRain.Sum > MinRain && MathUtilities.Sum(waterBalance.ESW) > MinESW) 
                    isPossibleToday = true;

                   if (Verbose)
                {
                    if (isPossibleToday)
                        Summary.WriteMessage(this, "Sowing is possible today", MessageType.Diagnostic);
                    else if (!Crop.IsAlive && endOfWindow && MustSow)
                        Summary.WriteMessage(this, "Sowing is possible today, but conditions are not ideal. Only sowing because MustSow is set to yes", MessageType.Diagnostic);
                    else if (Crop.IsAlive)
                        Summary.WriteMessage(this, "Not sowing today because crop is already alive", MessageType.Diagnostic);
                    else if (!inWindow)
                        Summary.WriteMessage(this, string.Format("Not sowing today because current date ({0}) is not in sowing window ({1} - {2}).", Clock.Today.ToString("dd-MMM"), StartDate, EndDate), MessageType.Diagnostic);
                    else if (!(accumulatedRain.Sum > MinRain))
                        Summary.WriteMessage(this, string.Format("Not sowing today because accumulated rain ({0}) is less than min rain required for sowing ({1})", accumulatedRain.Sum, MinRain), MessageType.Diagnostic);
                    else if (!(MathUtilities.Sum(waterBalance.ESW) > MinESW))
                        Summary.WriteMessage(this, string.Format("Not sowing today because ESW ({0}) is less than min ESW required for sowing ({1})", MathUtilities.Sum(waterBalance.ESW), MinESW), MessageType.Diagnostic);
                }

               if (isPossibleToday)
                   return true;

               if (! Crop.IsAlive && endOfWindow && MustSow) 
                   return true;

               if (! Crop.IsAlive && !inWindow)
                   return false;

               return false;
            }
        }

        public void SowCrop()
        {
           Summary.WriteMessage(this, this.FullPath + " -  sowing " + (Crop as Model).Name, MessageType.Diagnostic);
           Crop.Sow(population:Population, cultivar:CultivarName, depth:SowingDepth, rowSpacing:RowSpacing);    
        }

        [Units("0-1")]
        public int CanHarvest
        {
           get
           {
             if (!afterInit)
                 return 0;
             return Crop.IsReadyForHarvesting ? 1 : 0;
           }
        }

        public void HarvestCrop(string msg)
        {
           Summary.WriteMessage(this, "Harvesting crop " + (Crop as IModel).Name + ". Message: " + msg, MessageType.Diagnostic);
           Crop.Harvest();
           Crop.EndCrop();
        }
    }
}
```
        Manager PeanutSowingRule
          Crop = [Peanut]
          SowDate = 1-Nov
          CultivarName = Florunner
          SowingDepth = 30
          RowSpacing = 750
          Population = 6
          script: same as in pd.Base_one.Field.MaizeSowingRule
        Manager PeanutFertiliserRule
          ApplicationAmount = 160
          FertType = UreaGranular
          CropName = Peanut
          script: same as in pd.Base_one.Field.MaizeFertiliserRule
        Manager PeanutHarvest
```csharp
using Models.Soils.Nutrients;
using System;
using System.Linq;
using Models.Core;
using Models.PMF;
using Models.Soils;
using Models.Soils.Nutrients;
using Models.Utilities;
using APSIM.Shared.Utilities;

namespace Models
{
    [Serializable]
    public class Script : Model
    {
        [Link] Plant Peanut;

        [EventSubscribe("DoManagement")]
        private void OnDoManagement(object sender, EventArgs e)
        {
            if (Peanut.IsReadyForHarvesting)
            {
               Peanut.Harvest();
               Peanut.EndCrop();    
            }
        
        }
        
    }
}
```
  DataStore
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