Simulations Ghana_Maize_Soybean_Rotation_Template: Version=220
  Simulation GHA_0001_Maize_Soybean_Rotation
    Clock: Start=2023-01-01; End=2025-12-31
    Summary SummaryFile
    Weather: FileName=weather/GHA_0001.met
    SoilArbitrator Soil Arbitrator
    Zone Field: Area=1; Slope=0; AspectAngle=0; Altitude=50
      Report RotationHarvestReport
        VariableNames:
          [Clock].Today
          [RotationManager].CurrentState
          [Maize].IsAlive
          [Soybean].IsAlive
          [Maize].Phenology.CurrentStageName
          [Maize].Phenology.EmergenceDAS
          [Maize].Phenology.FloweringDAS
          [Maize].Phenology.MaturityDAS
          [Maize].SowingDate
          [Maize].AboveGround.Wt
          [Maize].AboveGround.N
          [Maize].Grain.Total.Wt
          [Maize].Grain.Wt*10 as MaizeYield
          [Maize].Grain.N
          [Maize].Total.Wt
          [Soybean].Phenology.CurrentStageName
          [Soybean].Phenology.EmergenceDAS
          [Soybean].Phenology.FloweringDAS
          [Soybean].Phenology.MaturityDAS
          [Soybean].SowingDate
          [Soybean].AboveGround.Wt
          [Soybean].AboveGround.N
          [Soybean].Grain.Total.Wt
          [Soybean].Grain.Wt*10 as SoybeanYield
          [Soybean].Grain.N
          [Soybean].Total.Wt
          sum([Soil].SoilWater.ESW) as TotalESW
          Mean([Soil].Nutrient.NO3.ppm[1:4]) as MeanNO3ppm
          Sum([Soil].Nutrient.NO3.ppm[1:4]) as SumNO3ppm
          Mean([Soil].Nutrient.NH4.ppm[1:4]) as MeanNH4ppm
          Sum([Soil].Nutrient.NH4.ppm[1:4]) as SumNH4ppm
        EventNames:
          [Maize].Harvesting
          [Soybean].Harvesting
      Fertiliser
      SurfaceOrganicMatter: InitialResidueName=maize_residue; InitialResidueType=maize; InitialResidueMass=2000; InitialStandingFraction=0; InitialCPR=0; InitialCNR=12
      Soil: ASCOrder=NA; ASCSubOrder=NA; SoilType=Ghana SoilGrids profile; Site=GHA_0001; NearestTown=NA; Region=Ghana; State=NA; Country=Ghana; NaturalVegetation=NA; ApsoilNumber=9999; Latitude=10.958061; Longitude=-0.387495; LocationAccuracy=+- 250 m; DataSource=Ghana APSIM Soil Profiles
        Comments=Site-specific Ghana soil profile; rotation modeling with RotationManager state machine.
        Physical
          Thickness  BD    LL15   DUL    SAT       KS       AirDry  ParticleSizeSand  ParticleSizeSilt  ParticleSizeClay
          50         1.55  0.104  0.2    0.415094  1500     0.084   41.7              26.2              32.1
          100        1.57  0.103  0.196  0.407547  1500     0.083   41.7              25.4              32.8
          150        1.59  0.115  0.202  0.4       1500     0.095   40.6              24.7              34.7
          300        1.65  0.181  0.236  0.377358  1043.29  0.161   38                23.5              38.5
          400        1.7   0.194  0.264  0.358491  693.972  0.174   39.1              22.7              38.2
          1000       1.7   0.191  0.281  0.358491  585.281  0.171   40.4              21.8              37.7
          SoilCrop MaizeSoil: LL=[0.104, 0.103, 0.115, 0.181, 0.194, 0.191]; KL=[0.06, 0.06, 0.06, 0.06, 0.06, 0.06]; XF=[1, 1, 1, 1, 1, 1]
          SoilCrop SoybeanSoil: LL=[0.104, 0.103, 0.115, 0.181, 0.194, 0.191]; KL=[0.06, 0.06, 0.06, 0.06, 0.06, 0.06]; XF=[1, 1, 1, 1, 1, 1]
        Organic: CarbonUnits=Total; FOMCNRatio=40
          Thickness  Carbon  SoilCNRatio  FBiom  FInert  FOM
          50         9.7     12           0.04   0.8     150
          100        7.5     12           0.033  0.808   122.81
          150        5.8     12           0.027  0.816   100.548
          300        4.2     12           0.022  0.824   82.322
          400        2.3     12           0.018  0.833   67.399
          1000       1.4     12           0.015  0.841   55.182
        Chemical: PHUnits=Water
          Thickness  PH   Nitrogen  CEC
          50         6.3  0.81      12.4
          100        6.3  0.54      12.4
          150        6.4  0.48      13.2
          300        6.4  0.37      13.6
          400        6.5  0.23      13.7
          1000       6.6  0.16      14
        SoilTemperature Temperature: Thickness=[50, 100, 150, 300, 400, 1000]; InitialValues=[25, 25, 25, 25, 25, 25]; InteractionsPerDay=8
        Water: Thickness=[50, 100, 150, 300, 400, 1000]; InitialValues=[0.152, 0.1495, 0.1585, 0.2085, 0.229, 0.236]; FilledFromTop=false
        WaterBalance SoilWater
        Nutrient
        Solute NO3: Thickness=[50, 100, 150, 300, 400, 1000]; InitialValues=[0, 0, 0, 0, 0, 0]; InitialValuesUnits=ppm; WaterTableConcentration=0; D0=0
        Solute NH4: Thickness=[50, 100, 150, 300, 400, 1000]; InitialValues=[0, 0, 0, 0, 0, 0]; InitialValuesUnits=ppm; WaterTableConcentration=0; D0=0
        Solute Urea: Thickness=[50, 100, 150, 300, 400, 1000]; InitialValues=[0, 0, 0, 0, 0, 0]; InitialValuesUnits=kg/ha; WaterTableConcentration=0; D0=0
      MicroClimate: a_interception=0; b_interception=1; c_interception=0; d_interception=0; SoilHeatFluxFraction=0.4; MinimumHeightDiffForNewLayer=0; NightInterceptionFraction=0.5; ReferenceHeight=2
      RotationManager: TopLevel=true; InitialState=initial; Verbose=true
        Nodes:
          ID  Name
          1   initial
          2   Maize
          3   Soybean
        Arcs:
          SourceID  DestinationID  Conditions                            Actions                                  ID  Name
          1         2              [[MaizeManager].Script.CanSow]        [[MaizeManager].Script.SowCrop()]        4   Arc 1
          2         3              [[MaizeManager].Script.CanHarvest]    [[MaizeManager].Script.HarvestCrop()]    5   Arc 2
          3         1              [[SoybeanManager].Script.CanHarvest]  [[SoybeanManager].Script.HarvestCrop()]  6   Arc 3
          1         3              [[SoybeanManager].Script.CanSow]      [[SoybeanManager].Script.SowCrop()]      7   Arc 4
      Plant Maize
      Plant Soybean
      Manager MaizeManager
        Crop = [Maize]
        Verbose = True
        StartDate = 01-Nov
        EndDate = 29-Nov
        MinESW = 20
        MinRain = 20
        RainDays = 5
        CultivarName = LY_110
        SowingDepth = 30
        RowSpacing = 750
        Population = 6
```csharp
using APSIM.Numerics;
using Models.Climate;
using System.Linq;
using System;
using Models.Core;
using Models.PMF;
using Models.Soils;
using Models.Utilities;
using APSIM.Shared.Utilities;
using Models.Interfaces;

namespace Models
{
    [Serializable]
    public class Script : Model
    {
        [Link] private Clock Clock;
        [Link] private Summary Summary;
        [Link] private Soil Soil;
        [Link] private ISoilWater waterBalance;

        [Separator("Script Configuration")]
        [Description("Crop to manage")]
        public IPlant Crop { get; set; }

        [Description("Verbose output?")]
        public bool Verbose { get; set; }

        [Separator("Sowing Conditions")]
        [Description("Start of sowing window (d-mmm)")]
        public string StartDate { get; set; }
        [Description("End of sowing window (d-mmm)")]
        public string EndDate { get; set; }
        [Description("Minimum extractable soil water (mm)")]
        public double MinESW { get; set; }
        [Description("Accumulated rainfall (mm)")]
        public double MinRain { get; set; }
        [Description("Duration of rainfall accumulation (d)")]
        public int RainDays { get; set; }

        [Separator("Sowing Properties")]
        [Description("Cultivar to be sown")]
        [Display(Type = DisplayType.CultivarName)]
        public string CultivarName { get; set; }
        [Description("Sowing depth (mm)")]
        public double SowingDepth { get; set; }
        [Description("Row spacing (mm)")]
        public double RowSpacing { get; set; }
        [Description("Plant population (/m2)")]
        public double Population { get; set; }

        public Accumulator accumulatedRain { get; private set; }
        private bool afterInit = false;

        [EventSubscribe("StartOfSimulation")]
        private void OnSimulationCommencing(object sender, EventArgs e)
        {
            if (Crop == null)
                throw new Exception("Crop must not be null");
            accumulatedRain = new Accumulator(this, "[Weather].Rain", RainDays);
            Summary.WriteMessage(this, "MaizeManager initialised", MessageType.Diagnostic);
            afterInit = true;
        }

        [EventSubscribe("DoManagement")]
        private void DoManagement(object sender, EventArgs e)
        {
            accumulatedRain.Update();
        }

        [Units("0-1")]
        public int CanSow
        {
            get
            {
                if (!afterInit) return 0;
                bool inWindow = DateUtilities.WithinDates(StartDate, Clock.Today, EndDate);
                bool enoughWater = MathUtilities.Sum(waterBalance.ESW) > MinESW;
                bool enoughRain = accumulatedRain.Sum > MinRain;
                if (!Crop.IsAlive && inWindow && enoughWater && enoughRain)
                    return 1;
                return 0;
            }
        }

        public void SowCrop()
        {
            Summary.WriteMessage(this, "Sowing maize", MessageType.Diagnostic);
            Crop.Sow(population: Population, cultivar: CultivarName, depth: SowingDepth, rowSpacing: RowSpacing);
        }

        [Units("0-1")]
        public int CanHarvest
        {
            get
            {
                if (!afterInit) return 0;
                return Crop.IsReadyForHarvesting ? 1 : 0;
            }
        }

        public void HarvestCrop()
        {
            Summary.WriteMessage(this, "Harvesting maize", MessageType.Diagnostic);
            Crop.Harvest();
            Crop.EndCrop();
        }
    }
}
```
      Manager SoybeanManager
        Crop = [Soybean]
        Verbose = True
        StartDate = 01-Nov
        EndDate = 29-Nov
        MinESW = 20
        MinRain = 20
        RainDays = 5
        CultivarName = Soya791
        SowingDepth = 30
        RowSpacing = 750
        Population = 10
```csharp
using APSIM.Numerics;
using Models.Climate;
using System.Linq;
using System;
using Models.Core;
using Models.PMF;
using Models.Soils;
using Models.Utilities;
using APSIM.Shared.Utilities;
using Models.Interfaces;

namespace Models
{
    [Serializable]
    public class Script : Model
    {
        [Link] private Clock Clock;
        [Link] private Summary Summary;
        [Link] private Soil Soil;
        [Link] private ISoilWater waterBalance;

        [Separator("Script Configuration")]
        [Description("Crop to manage")]
        public IPlant Crop { get; set; }

        [Description("Verbose output?")]
        public bool Verbose { get; set; }

        [Separator("Sowing Conditions")]
        [Description("Start of sowing window (d-mmm)")]
        public string StartDate { get; set; }
        [Description("End of sowing window (d-mmm)")]
        public string EndDate { get; set; }
        [Description("Minimum extractable soil water (mm)")]
        public double MinESW { get; set; }
        [Description("Accumulated rainfall (mm)")]
        public double MinRain { get; set; }
        [Description("Duration of rainfall accumulation (d)")]
        public int RainDays { get; set; }

        [Separator("Sowing Properties")]
        [Description("Cultivar to be sown")]
        [Display(Type = DisplayType.CultivarName)]
        public string CultivarName { get; set; }
        [Description("Sowing depth (mm)")]
        public double SowingDepth { get; set; }
        [Description("Row spacing (mm)")]
        public double RowSpacing { get; set; }
        [Description("Plant population (/m2)")]
        public double Population { get; set; }

        public Accumulator accumulatedRain { get; private set; }
        private bool afterInit = false;

        [EventSubscribe("StartOfSimulation")]
        private void OnSimulationCommencing(object sender, EventArgs e)
        {
            if (Crop == null)
                throw new Exception("Crop must not be null");
            accumulatedRain = new Accumulator(this, "[Weather].Rain", RainDays);
            Summary.WriteMessage(this, "SoybeanManager initialised", MessageType.Diagnostic);
            afterInit = true;
        }

        [EventSubscribe("DoManagement")]
        private void DoManagement(object sender, EventArgs e)
        {
            accumulatedRain.Update();
        }

        [Units("0-1")]
        public int CanSow
        {
            get
            {
                if (!afterInit) return 0;
                bool inWindow = DateUtilities.WithinDates(StartDate, Clock.Today, EndDate);
                bool enoughWater = MathUtilities.Sum(waterBalance.ESW) > MinESW;
                bool enoughRain = accumulatedRain.Sum > MinRain;
                if (!Crop.IsAlive && inWindow && enoughWater && enoughRain)
                    return 1;
                return 0;
            }
        }

        public void SowCrop()
        {
            Summary.WriteMessage(this, "Sowing soybean", MessageType.Diagnostic);
            Crop.Sow(population: Population, cultivar: CultivarName, depth: SowingDepth, rowSpacing: RowSpacing);
        }

        [Units("0-1")]
        public int CanHarvest
        {
            get
            {
                if (!afterInit) return 0;
                return Crop.IsReadyForHarvesting ? 1 : 0;
            }
        }

        public void HarvestCrop()
        {
            Summary.WriteMessage(this, "Harvesting soybean", MessageType.Diagnostic);
            Crop.Harvest();
            Crop.EndCrop();
        }
    }
}
```
      Manager MaizeFertiliserRule
        ApplicationAmount = 160
        FertType = DAP
        ApplicationDate = 01-Nov
```csharp
using Models.Soils;
using System;
using Models.Core;
using Models.PMF;

namespace Models
{
    [Serializable]
    public class Script : Model
    {
        [Link] private Fertiliser fertiliser;
        [Link] private Clock clock;

        [Description("Amount (kg/ha) of fertiliser to apply")]
        public double ApplicationAmount { get; set; }

        [Description("Type of fertiliser to apply")]
        [Display(Type = DisplayType.FertiliserType)]
        public string FertType { get; set; }

        [Description("Application date (d-MMM)")]
        public string ApplicationDate { get; set; }

        private bool applied = false;

        [EventSubscribe("DoManagement")]
        private void OnDoManagement(object sender, EventArgs e)
        {
            if (applied) return;
            string today = clock.Today.ToString("d-MMM");
            if (!today.Equals(ApplicationDate, StringComparison.OrdinalIgnoreCase)) return;
            fertiliser.Apply(amount: ApplicationAmount, type: FertType);
            applied = true;
        }
    }
}
```
      Manager SoybeanFertiliserRule
        ApplicationAmount = 10
        FertType = NO3N
        ApplicationDate = 15-Nov
        script: same as in GHA_0001_Maize_Soybean_Rotation.Field.MaizeFertiliserRule
  DataStore
