Simulations Ghana_Maize_Monocrop_Template: Version=182
  Simulation Ghana_Maize_Monocrop_Template
    Clock: Start=2023-01-01; End=2025-12-31
    Summary SummaryFile
    Weather: FileName=GHA_0001.met
    SoilArbitrator Soil Arbitrator
    Zone Field: Area=1; Slope=0; AspectAngle=0; Altitude=50
      Report MaizeHarvestReport: EventNames=[Maize].Harvesting
        VariableNames:
          [Clock].Today
          [Maize].Phenology.CurrentStageName
          [Maize].AboveGround.Wt
          [Maize].AboveGround.N
          [Maize].Grain.Total.Wt*10 as Yield
          [Maize].Grain.Wt
          [Maize].Grain.Size
          [Maize].Grain.NumberFunction
          [Maize].Grain.Total.Wt
          [Maize].Grain.N
          [Maize].Total.Wt
          [Maize].Phenology.EmergenceDAS
          [Maize].Phenology.FloweringDAS
          [Maize].Phenology.MaturityDAS
          [Maize].SowingDate
      Fertiliser
      SurfaceOrganicMatter: InitialResidueName=wheat_stubble; InitialResidueType=wheat; InitialResidueMass=500; InitialStandingFraction=0; InitialCPR=0; InitialCNR=10
      Soil: ASCOrder=NA; ASCSubOrder=NA; SoilType=Ghana SoilGrids template; Site=TEMPLATE; NearestTown=NA; Region=Ghana; State=NA; Country=Ghana; NaturalVegetation=NA; ApsoilNumber=9999; Latitude=10.958061; Longitude=-0.387495; LocationAccuracy=+- 250 m; DataSource=Ghana APSIM Soil Profiles
        Comments=Site-specific Ghana soil profile from the project Ghana APSIM soil dataset.
        Physical
          Thickness  BD    LL15   DUL    SAT       KS       ParticleSizeSand  ParticleSizeSilt  ParticleSizeClay  AirDry
          50         1.55  0.104  0.2    0.415094  1500     41.7              26.2              32.1              0.084
          100        1.57  0.103  0.196  0.407547  1500     41.7              25.4              32.8              0.083
          150        1.59  0.115  0.202  0.4       1500     40.6              24.7              34.7              0.095
          300        1.65  0.181  0.236  0.377358  1043.29  38                23.5              38.5              0.161
          400        1.7   0.194  0.264  0.358491  693.972  39.1              22.7              38.2              0.174
          1000       1.7   0.191  0.281  0.358491  585.281  40.4              21.8              37.7              0.171
          SoilCrop MaizeSoil: LL=[0.104, 0.103, 0.115, 0.181, 0.194, 0.191]; KL=[0.06, 0.06, 0.06, 0.06, 0.06, 0.06]; XF=[1, 1, 1, 1, 1, 1]
        Organic: FOMCNRatio=40; CarbonUnits=Total
          Thickness  Carbon  SoilCNRatio  FBiom  FInert  FOM
          50         9.7     12           0.04   0.8     150
          100        7.5     12           0.033  0.808   122.81
          150        5.8     12           0.027  0.816   100.548
          300        4.2     12           0.022  0.824   82.322
          400        2.3     12           0.018  0.833   67.399
          1000       1.4     12           0.015  0.841   55.182
        Chemical
          Thickness  PH   Nitrogen  CEC
          50         6.3  0.81      12.4
          100        6.3  0.54      12.4
          150        6.4  0.48      13.2
          300        6.4  0.37      13.6
          400        6.5  0.23      13.7
          1000       6.6  0.16      14
        SoilTemperature Temperature: Thickness=[50, 100, 150, 300, 400, 1000]; InitialValues=[25, 25, 25, 25, 25, 25]; InteractionsPerDay=8
        Water: Thickness=[50, 100, 150, 300, 400, 1000]; InitialValues=[0.142, 0.1395, 0.1485, 0.1985, 0.219, 0.226]; InitialPAWmm=0; RelativeTo=LL15; FilledFromTop=false
        Nutrient
        Solute NO3: Thickness=[50, 100, 150, 300, 400, 1000]; InitialValues=[0, 0, 0, 0, 0, 0]; InitialValuesUnits=ppm; WaterTableConcentration=0; D0=0
        Solute NH4: Thickness=[50, 100, 150, 300, 400, 1000]; InitialValues=[0, 0, 0, 0, 0, 0]; InitialValuesUnits=ppm; WaterTableConcentration=0; D0=0; DepthConstant=0; MaxDepthSoluteAccessible=0; RunoffEffectivenessAtMovingSolute=0; MaxEffectiveRunoff=0
        Solute Urea: Thickness=[50, 100, 150, 300, 400, 1000]; InitialValues=[0, 0, 0, 0, 0, 0]; InitialValuesUnits=kg/ha; WaterTableConcentration=0; D0=0; DepthConstant=0; MaxDepthSoluteAccessible=0; RunoffEffectivenessAtMovingSolute=0; MaxEffectiveRunoff=0
      WaterBalance SoilWater
      Plant Maize
        Cultivar Early
          Command:
            [Phenology].Juvenile.Target.FixedValue = 135
            [Phenology].Photosensitive.Target.XYPairs.X = 0, 12.5, 24
            [Phenology].Photosensitive.Target.XYPairs.Y = 0, 0, 264.5
            [Structure].Phyllochron.Phyllochron.Phyllochron.XYPairs.X = 1, 2.4, 3.2
            [Structure].Phyllochron.Phyllochron.Phyllochron.XYPairs.Y = 22, 22, 34
            [Phenology].FlagLeafToFlowering.Target.FixedValue = 10
            [Phenology].FloweringToGrainFilling.Target.FixedValue = 140
            [Phenology].GrainFilling.Target.FixedValue = 280
            [Grain].MaximumGrainsPerCob.FixedValue = 586
            [Grain].MaximumPotentialGrainSize.FixedValue = 0.341
        Cultivar Mid
          Command:
            [Phenology].Juvenile.Target.FixedValue = 150
            [Phenology].Photosensitive.Target.XYPairs.X = 0, 12.5, 24
            [Phenology].Photosensitive.Target.XYPairs.Y = 0, 0, 0
            [Structure].Phyllochron.Phyllochron.Phyllochron.XYPairs.X = 1, 2.8, 3.3
            [Structure].Phyllochron.Phyllochron.Phyllochron.XYPairs.Y = 26, 26, 38
            [Phenology].FlagLeafToFlowering.Target.FixedValue = 1
            [Phenology].FloweringToGrainFilling.Target.FixedValue = 170
            [Phenology].GrainFilling.Target.FixedValue = 410
            [Phenology].Maturing.Target.FixedValue = 1
            [Grain].MaximumGrainsPerCob.FixedValue = 580
            [Grain].MaximumPotentialGrainSize.FixedValue = 0.381
        Cultivar Late
          Command:
            [Phenology].Juvenile.Target.FixedValue = 185
            [Phenology].Photosensitive.Target.XYPairs.X = 0, 12.5, 24
            [Phenology].Photosensitive.Target.XYPairs.Y = 0, 0, 0
            [Structure].Phyllochron.Phyllochron.Phyllochron.XYPairs.X = 1, 2.8, 3.3
            [Structure].Phyllochron.Phyllochron.Phyllochron.XYPairs.Y = 28, 28, 40
            [Phenology].FlagLeafToFlowering.Target.FixedValue = 1
            [Phenology].FloweringToGrainFilling.Target.FixedValue = 150
            [Phenology].GrainFilling.Target.FixedValue = 410
            [Phenology].Maturing.Target.FixedValue = 1
            [Phenology].MaturityToHarvestRipe.Target.FixedValue = 100
            [Grain].MaximumPotentialGrainSize.FixedValue = 0.361
      MicroClimate: a_interception=0; b_interception=1; c_interception=0; d_interception=0; SoilHeatFluxFraction=0.4; MinimumHeightDiffForNewLayer=0; NightInterceptionFraction=0.5; ReferenceHeight=2
      Manager MaizeManager
        Crop = [Maize]
        StartDate = 01-nov
        EndDate = 10-jan
        MinESW = 0
        MinRain = 0
        RainDays = 0
        CultivarName = Mid
        SowingDepth = 30
        RowSpacing = 750
        Population = 6
```csharp
using APSIM.Numerics;
using Models.Climate;
using System;
using Models.Core;
using Models.PMF;
using Models.Soils;
using Models.Utilities;
using Models.Interfaces;
using APSIM.Shared.Utilities;

namespace Models
{
    [Serializable]
    public class Script : Model
    {
        [Link] private Clock Clock;
        [Link] private Summary Summary;
        [Link] private ISoilWater waterBalance;

        [Description("Crop")]
        public IPlant Crop { get; set; }

        [Description("Start of sowing window (d-mmm)")]
        public string StartDate { get; set; }

        [Description("End of sowing window (d-mmm)")]
        public string EndDate { get; set; }

        [Description("Minimum extractable soil water for sowing (mm)")]
        public double MinESW { get; set; }

        [Description("Minimum rainfall required for sowing (mm)")]
        public double MinRain { get; set; } = 0;

        [Description("Number of days over which rainfall is accumulated for sowing")]
        public int RainDays { get; set; } = 0;

        [Display(Type = DisplayType.CultivarName)]
        [Description("Cultivar to be sown")]
        public string CultivarName { get; set; }

        [Description("Sowing depth (mm)")]
        public double SowingDepth { get; set; }

        [Description("Row spacing (mm)")]
        public double RowSpacing { get; set; }

        [Description("Plant population (/m2)")]
        public double Population { get; set; }

        [EventSubscribe("DoManagement")]
        private void OnDoManagement(object sender, EventArgs e)
        {
            if (Crop == null || Crop.IsAlive)
                return;

            bool inWindow = DateUtilities.WithinDates(StartDate, Clock.Today, EndDate);
            bool enoughWater = MathUtilities.Sum(waterBalance.ESW) > MinESW;
            bool enoughRain = true;

            if (inWindow && enoughWater && enoughRain)
            {
                Summary.WriteMessage(this, "Sowing maize", MessageType.Diagnostic);
                Crop.Sow(population: Population, cultivar: CultivarName, depth: SowingDepth, rowSpacing: RowSpacing);
            }
        }
    }
}
```
      Manager MaizeHarvest
        Crop = [Maize]
```csharp
using Models.PMF.Phen;
using APSIM.Shared.Utilities;
using System.Xml.Serialization;
using Models;
using Models.PMF;
using Models.Soils;
using System.Text;
using System.Collections.Generic;
using Models.Core;
using System;
using Models.Soils.Nutrients;

namespace Models
{
    [Serializable] 
    public class Script : Model
    {
        [Link(ByName = true)] private Plant Maize;
        [Link] private Zone zone;
        [Link(Type = LinkType.Path, Path = "[Maize].Phenology")]
        private Phenology phenology;
                    
        
        [EventSubscribe("StartOfSimulation")]
        private void OnSimulationCommencing(object sender, EventArgs e)
        {
        }
        
        [EventSubscribe("DoManagement")]
        private void OnDoManagement(object sender, EventArgs e)
        {
            if (phenology.CurrentPhase.Name == "ReadyForHarvesting")
            {
                Maize.Harvest();
                Maize.EndCrop();
            }
        }
        
        [EventSubscribe("DoManagementCalculations")]
        private void OnDoManagementCalculations(object sender, EventArgs e)
        {
            
        }
    }
}
```
      Manager MaizeFertiliserRule
        ApplicationAmount = 160
        FertType = NO3N
        CropName = Maize
        ApplicationDate = 01-Nov
```csharp
using Models.Soils;
using System;
using Models.Core;
using Models.PMF;

namespace Models
{
    [Serializable]
    public class Script : Model
    {
        [Link] private Fertiliser fertiliser;
        [Link] private Clock clock;

        [Description("Amount (kg/ha) of fertiliser to apply")]
        public double ApplicationAmount { get; set; }

        [Description("Type of fertiliser to apply")]
        [Display(Type = DisplayType.FertiliserType)]
        public string FertType { get; set; }

        [Description("Crop to be fertilised")]
        public string CropName { get; set; }

        [Description("Application date (d-MMM, e.g. 01-Nov)")]
        public string ApplicationDate { get; set; }

        private bool applied = false;

        [EventSubscribe("DoManagement")]
        private void OnDoManagement(object sender, EventArgs e)
        {
            if (applied)
                return;

            string today = clock.Today.ToString("d-MMM");
            if (!today.Equals(ApplicationDate, StringComparison.OrdinalIgnoreCase))
                return;

            fertiliser.Apply(amount: ApplicationAmount, type: FertType);
            applied = true;
        }
    }
}
```
  DataStore: FileName=|DataStore|Ghana_Maize_Monocrop_Template.db
