Simulations Ghana_Soybean_Monocrop_GHA_0001: Version=220
  Simulation GHA_0001_Soybean_Monocrop
    Clock: Start=2023-01-01; End=2025-12-31
    Summary SummaryFile
    Weather: FileName=GHA_0001_APSIM.met
    SoilArbitrator Soil Arbitrator
    Zone Field: Area=1; Slope=0; AspectAngle=0; Altitude=50
      Report HarvestReport: EventNames=[Soybean].Harvesting
        VariableNames:
          [Clock].Today
          [Soybean].Phenology.CurrentStageName
          [Soybean].AboveGround.Wt
          [Soybean].AboveGround.N
          [Soybean].Grain.Wt
          [Soybean].Grain.Size
          [Soybean].Grain.NumberFunction
          [Soybean].Grain.N
          [Soybean].Total.Wt
          [Soybean].Phenology.EmergenceDAS
          [Soybean].Phenology.FloweringDAS
          [Soybean].Phenology.MaturityDAS
          Sum of [Weather].Rain from [Soybean].Sowing to [Soybean].Harvesting as InCropRainfall
          Sum of [Weather].Radn from [Soybean].Sowing to [Soybean].Harvesting as InCropRadn
          Mean of [Weather].MaxT from [Soybean].Sowing to [Soybean].Harvesting as InCropMaxTemperature
          Mean of [Weather].MinT from [Soybean].Sowing to [Soybean].Harvesting as InCropMinTemperature
          Sum of [Soil].SoilWater.Eo from [Soybean].Sowing to [Soybean].Harvesting as InCropET
          Sum of [Soil].SoilWater.Es from [Soybean].Sowing to [Soybean].Harvesting as InCropES
          ([Soybean].Grain.Wt * 10) / InCropET as WUE2
          sum([Soil].SoilWater.ESW) as TotalESW
          [Soybean].Grain.Total.Wt*10 as SoybeanYield
          [Soybean].SowingDate
      Report DailyReport: EventNames=[Clock].EndOfDay
        VariableNames:
          [Clock].Today
          [Soybean].IsAlive
          [Soybean].SowingDate
          [Soybean].AboveGround.Wt
          [Soybean].AboveGround.N
          [Soybean].Phenology.CurrentStageName
          [Soil].SoilWater.ESW
      Fertiliser
      SurfaceOrganicMatter: InitialResidueName=soybean_stubble; InitialResidueType=soybean; InitialResidueMass=0; InitialStandingFraction=0; InitialCPR=0; InitialCNR=12
      Soil: ASCOrder=NA; ASCSubOrder=NA; SoilType=Ghana SoilGrids profile; Site=GHA_0001; NearestTown=NA; Region=Ghana; State=NA; Country=Ghana; NaturalVegetation=NA; ApsoilNumber=9999; Latitude=10.958061; Longitude=-0.387495; LocationAccuracy=+- 250 m; DataSource=Ghana APSIM Soil Profiles
        Comments=Site-specific Ghana soil profile from the project Ghana APSIM soil dataset.
        Physical
          Thickness  BD    AirDry  LL15   DUL    SAT       KS
          50         1.55  0.084   0.104  0.2    0.415094  1500
          100        1.57  0.083   0.103  0.196  0.407547  1500
          150        1.59  0.095   0.115  0.202  0.4       1500
          300        1.65  0.161   0.181  0.236  0.377358  1043.29
          400        1.7   0.174   0.194  0.264  0.358491  693.972
          1000       1.7   0.171   0.191  0.281  0.358491  585.281
          SoilCrop SoybeanSoil: LL=[0.104, 0.103, 0.115, 0.181, 0.194, 0.191]; KL=[0.06, 0.06, 0.06, 0.06, 0.06, 0.06]; XF=[1, 1, 1, 1, 1, 1]
        Organic: FOMCNRatio=40; CarbonUnits=Total
          Thickness  Carbon  SoilCNRatio  FBiom  FInert  FOM
          50         9.7     12           0.04   0.8     150
          100        7.5     12           0.033  0.808   122.81
          150        5.8     12           0.027  0.816   100.548
          300        4.2     12           0.022  0.824   82.322
          400        2.3     12           0.018  0.833   67.399
          1000       1.4     12           0.015  0.841   55.182
        Chemical: PHUnits=Water
          Thickness  PH   CEC
          50         6.3  12.4
          100        6.3  12.4
          150        6.4  13.2
          300        6.4  13.6
          400        6.5  13.7
          1000       6.6  14
        SoilTemperature Temperature: Thickness=[50, 100, 150, 300, 400, 1000]; InitialValues=[25, 25, 25, 25, 25, 25]; InteractionsPerDay=8
        Water: Thickness=[50, 100, 150, 300, 400, 1000]; InitialValues=[0.152, 0.1495, 0.1585, 0.2085, 0.229, 0.236]; FilledFromTop=false
        WaterBalance SoilWater: SummerDate=1-Nov; SummerU=5; SummerCona=5; WinterDate=1-Apr; WinterU=5; WinterCona=5; DiffusConst=40; DiffusSlope=16; Salb=0.12; CN2Bare=73; CNRed=20; CNCov=0.8; PSIDul=-100; Thickness=[50, 100, 150, 300, 400, 1000]; SWCON=[0.3, 0.3, 0.3, 0.3, 0.3, 0.3]
        Nutrient
        Solute NO3: Thickness=[50, 100, 150, 300, 400, 1000]; InitialValues=[0, 0, 0, 0, 0, 0]; InitialValuesUnits=ppm; WaterTableConcentration=0; D0=0; DepthConstant=0; MaxDepthSoluteAccessible=0; RunoffEffectivenessAtMovingSolute=0; MaxEffectiveRunoff=0
        Solute NH4: same as GHA_0001_Soybean_Monocrop.Field.Soil.NO3
        Solute Urea: Thickness=[50, 100, 150, 300, 400, 1000]; InitialValues=[0, 0, 0, 0, 0, 0]; InitialValuesUnits=kg/ha; WaterTableConcentration=0; D0=0; DepthConstant=0; MaxDepthSoluteAccessible=0; RunoffEffectivenessAtMovingSolute=0; MaxEffectiveRunoff=0
      MicroClimate: a_interception=0; b_interception=1; c_interception=0; d_interception=0; SoilHeatFluxFraction=0.4; MinimumHeightDiffForNewLayer=0; NightInterceptionFraction=0.5; ReferenceHeight=2
      Plant Soybean
      Manager SoybeanManager
        Crop = [Soybean]
        StartDate = 01-nov
        EndDate = 29-nov
        MinESW = 0
        MinRain = 0
        RainDays = 5
        CultivarName = Soya791
        SowingDepth = 30
        RowSpacing = 750
        Population = 10
```csharp
using APSIM.Numerics;
using Models.Climate;
using System;
using Models.Core;
using Models.PMF;
using Models.Soils;
using Models.Utilities;
using Models.Interfaces;
using APSIM.Shared.Utilities;

namespace Models
{
    [Serializable]
    public class Script : Model
    {
        [Link] private Clock Clock;
        [Link] private Summary Summary;
        [Link] private ISoilWater waterBalance;

        [Description("Crop")]
        public IPlant Crop { get; set; }

        [Description("Start of sowing window (d-mmm)")]
        public string StartDate { get; set; }

        [Description("End of sowing window (d-mmm)")]
        public string EndDate { get; set; }

        [Description("Minimum extractable soil water for sowing (mm)")]
        public double MinESW { get; set; }

        [Description("Accumulated rainfall required for sowing (mm)")]
        public double MinRain { get; set; }

        [Description("Duration of rainfall accumulation (d)")]
        public int RainDays { get; set; }

        [Display(Type = DisplayType.CultivarName)]
        [Description("Cultivar to be sown")]
        public string CultivarName { get; set; }

        [Description("Sowing depth (mm)")]
        public double SowingDepth { get; set; }

        [Description("Row spacing (mm)")]
        public double RowSpacing { get; set; }

        [Description("Plant population (/m2)")]
        public double Population { get; set; }

        [EventSubscribe("DoManagement")]
        private void OnDoManagement(object sender, EventArgs e)
        {
            if (Crop == null || Crop.IsAlive)
                return;

            bool inWindow = DateUtilities.WithinDates(StartDate, Clock.Today, EndDate);
            bool enoughWater = MathUtilities.Sum(waterBalance.ESW) > MinESW;

            if (inWindow && enoughWater)
            {
                Summary.WriteMessage(this, "Sowing soybean", MessageType.Diagnostic);
                Crop.Sow(
                    population: Population,
                    cultivar: CultivarName,
                    depth: SowingDepth,
                    rowSpacing: RowSpacing);
            }
        }
    }
}
```
      Manager SoybeanFertiliserRule
        ApplicationAmount = 10
        FertType = NO3N
        CropName = Soybean
```csharp
using Models.Soils;
using System;
using Models.Core;
using Models.PMF;

namespace Models
{
    [Serializable]
    public class Script : Model
    {
        [Link]
        private Fertiliser fertiliser;

        [Link]
        private Clock clock;

        [Description("Amount (kg/ha) of fertiliser to apply")]
        public double ApplicationAmount { get; set; }

        [Description("Type of fertiliser to apply")]
        [Display(Type = DisplayType.FertiliserType)]public string FertType { get; set; }
        
        [Description("Crop to be fertilised")]
        public string CropName { get; set;}

        [EventSubscribe("DoManagement")]
        private void OnDoManagement(object sender, EventArgs e)
        {
            Model crop = sender as Model;
            if (crop.Name.ToLower()==CropName.ToLower())
                fertiliser.Apply(amount: ApplicationAmount, type: FertType);
        }
    }
}
```
      Manager SoybeanHarvest
        Crop = [Soybean]
```csharp
using APSIM.Shared.Utilities;
using Models.Utilities;
using Models.Soils;
using Models.PMF;
using Models.Core;
using System;
using System.Linq;

namespace Models
{
    [Serializable] 
    public class Script : Model
    {
        [Description("Crop")]
        public IPlant Crop { get; set; }
        
        [EventSubscribe("DoManagement")]
        private void OnDoManagement(object sender, EventArgs e)
        {
            if (Crop.IsReadyForHarvesting)
            {
                Crop.Harvest();
                Crop.EndCrop();
            }
        }
    }
}
```
  DataStore
